I := [1.079489696; 0.970873786; 1.666666667; 1.301832208; 1.612115291]
D := [1; 0]
w3 := [0, 0, 0; 0, 0, 0; 0, 0, 0]
w2 := [0, 0, 0, 0, 0; 0, 0, 0, 0, 0; 0, 0, 0, 0, 0]
w4 := [0, 0; 0, 0; 0, 0]
w2[0, 1] = 0
b4 := [0; 0]
b3 := [0; 0; 0]
b2 := [0; 0; 0]
sig(x) := 1/(1 + 1/e^x)
jh2 := 0, 1 .. 2
sigdiv(x) := 1/(1 + 1/e^x)*(1 - 1/(1 + 1/e^x))
jh3 := 0, 1 .. 2
h2[jh2] := sig(sum(I[i]*w2[jh2, i], i = 0 .. 4) + b2[jh2])
jO := 0, 1 .. 1
h2 = [0.5; 0.5; 0.5]
h3[jh3] := sig(sum(h2[i]*w3[jh3, i], i = 0 .. 2) + b3[jh3])
h3 = [0.5; 0.5; 0.5]
O[jO] := sig(sum(h3[i]*w4[jO, i], i = 0 .. 1) + b4[jO])
O = [0.5; 0.5]
C := sum((O[i] - D[i])^2, i = 0 .. 1) = 0.5
a1[jO] := 2*(O[jO] - D[jO])
a1 = [-1; 1]
dw4[jO, jh3] := sigdiv(sum(h3[i]*w4[jO, i], i = 0 .. 1) + b4[jO])*a1[jO]*h3[jh3]
dw4 = [-0.125, -0.125, -0.125; 0.125, 0.125, 0.125]
